*Heading
** Job name: OneTaper3D Model name: Model-1
** Generated by: Abaqus/CAE 6.10-1
*Preprint, echo=NO, model=NO, history=NO, contact=NO
**
** PARTS
**
*Part, name=Part-2
*End Part
**
**
** ASSEMBLY
**
*Assembly, name=Assembly
**
*Instance, name=Part-2-1, part=Part-2
*Node
      1,    0.2511307, 0.0457530953,           0.
      2,    0.2511307, 0.0397999994,           0.
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*Element, type=C3D8
 1,    68,  1652,    63,     1,  1689, 10556,  1701,   112
 2,  1652,  1653,    64,    63, 10556, 10557,  1700,  1701
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*Element, type=COH3D8
73,  119,   68,    1,    9, 1722, 1689,  112,  131
74,   10,    4,   68,  119,  120,   91, 1689, 1722
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*Nset, nset=_PickedSet16, internal
    10,    12,    13,    14,    15,    16
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*Elset, elset=_PickedSet16, internal
    97,    98,    99,   100,   101,   102
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*Nset, nset=_PickedSet20, internal
     9,    10,    11,    12,    13,    17
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*Elset, elset=_PickedSet20, internal
   145,   146,   147,   148,   149,   150
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*Nset, nset=_PickedSet47, internal
    4,    7,   10,   12,   53,   54
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*Elset, elset=_PickedSet47, internal, generate
 14209,  14400,      1
*Nset, nset=_PickedSet48, internal
    1,    4,    6,    7,    9,   10
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*Elset, elset=_PickedSet48, internal
    73,    74,    75,    76,    77,    78
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*Nset, nset=_PickedSet49, internal
   19,   20,   21,   22,   23,   24
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*Elset, elset=_PickedSet49, internal, generate
 157,  420,    1
*Nset, nset=_PickedSet129, internal
     1,     2,     3,     4,     5,     6
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*Elset, elset=_PickedSet129, internal
     1,     2,     3,     4,     5,     6
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*Nset, nset=_PickedSet130, internal
     9,    11,    23,    24,    25,    26
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*Elset, elset=_PickedSet130, internal
   421,   422,   423,   424,   425,   426
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*Nset, nset=_PickedSet131, internal
   20,   21,   23,   24,   33,   34
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*Elset, elset=_PickedSet131, internal, generate
 7045,  7608,     1
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*Elset, elset=_PickedSet138, internal, generate
 145,  156,    1
*Nset, nset=_PickedSet139, internal
     9,    11,    13,    17,    28,    29
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*Elset, elset=_PickedSet139, internal, generate
 17533,  17760,      1
*Nset, nset=_PickedSet140, internal
   27,   28,   29,   30,   41,   42
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*Elset, elset=_PickedSet140, internal, generate
 12121,  12384,      1
*Nset, nset=_PickedSet141, internal
   27,   30,   31,   32,   41,   42
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*Elset, elset=_PickedSet141, internal, generate
 9301,  9864,     1
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** Section: outer skin
*Solid Section, elset=_PickedSet129, material="outer skin"
1.,
** Section: CohesiveSectionFaceFace
*Cohesive Section, elset=_PickedSet48, material=CohesiveMatFaceFace, response=TRACTION SEPARATION, thickness=GEOMETRY
, 1.
** Section: inner skin
*Solid Section, elset=_PickedSet16, material="inner skin"
1.,
*Orientation, name=Ori-1
1., 0., 0., 0., 1., 0.
3, 0.
** Section: inner skin
*Solid Section, elset=_PickedSet138, orientation=Ori-1, material="inner skin"
1.,
** Section: CohesiveSectionFaceFace
*Cohesive Section, elset=_PickedSet49, material=CohesiveMatFaceFace, response=TRACTION SEPARATION, thickness=GEOMETRY
, 1.
** Section: core
*Solid Section, elset=_PickedSet130, orientation=Ori-1, material=core
1.,
** Section: CohesiveSectionFaceFace
*Cohesive Section, elset=_PickedSet131, material=CohesiveMatFaceFace, response=TRACTION SEPARATION, thickness=GEOMETRY
, 1.
*Orientation, name=Ori-4
0.999999999999823, -5.95618790920243e-07,           0.,           0.,           0.,          -1.
3, 0.
** Section: CohesiveSectionFaceFace
*Cohesive Section, elset=_PickedSet141, orientation=Ori-4, material=CohesiveMatFaceFace, response=TRACTION SEPARATION,
thickness=GEOMETRY
, 1.
*Orientation, name=Ori-3
0.999999999999823, -5.95618790920243e-07,           0.,           0.,           0.,          -1.
3, 0.
** Section: CohesiveSectionFaceFace
*Cohesive Section, elset=_PickedSet140, orientation=Ori-3, material=CohesiveMatFaceFace, response=TRACTION SEPARATION,
thickness=GEOMETRY
, 1.
** Section: CohesiveSectionFaceFace
*Cohesive Section, elset=_PickedSet47, material=CohesiveMatFaceFace, response=TRACTION SEPARATION, thickness=GEOMETRY
, 1.
*Orientation, name=Ori-5
1., 0., 0., 0., 1., 0.
1, 0.
** Section: CohesiveSectionFaceFace
*Cohesive Section, elset=_PickedSet139, orientation=Ori-5, material=CohesiveMatFaceFace, response=TRACTION SEPARATION,
thickness=GEOMETRY
, 1.
*End Instance
**
*Nset, nset=_PickedSet25, internal, instance=Part-2-1
   39,   40,   59,   60,  796,  797
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*Elset, elset=_PickedSet25, internal, instance=Part-2-1
  9289,  9290,  9291,  9292,  9293,  9294
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*Nset, nset=_PickedSet26, internal, instance=Part-2-1
  45,  46, 979, 980, 981, 982, 983, 984, 985, 986, 987, 988, 989
*Elset, elset=_PickedSet26, internal, instance=Part-2-1
 11557, 11558, 11559, 11560, 11561, 11562
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*Nset, nset=_PickedSet27, internal, instance=Part-2-1
     9,    11,    25,    26,    28,    29
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*Elset, elset=_PickedSet27, internal, instance=Part-2-1, generate
 15769,  16620,      1
*End Assembly
**
** MATERIALS
**
*Material, name=CohesiveMatFaceFace
*Damage Initiation, criterion=MAXS
 6e+07, 5e+07, 5e+07
*Damage Evolution, type=DISPLACEMENT
 0.001,
*Elastic, type=TRACTION
 6.9e+12, 6.9e+12, 6.9e+12
*Material, name=core
*Elastic, type=ENGINEERING CONSTANTS
 1.25e+08, 1.25e+08, 1.25e+08,      0.3,      0.3,      0.3,  3.8e+07,  3.8e+07
  3.8e+07,
*Material, name="inner skin"
*Elastic
 1.1871e+07, 0.3
*Material, name="outer skin"
*Elastic
 1.0229e+07, 0.3
** ----------------------------------------------------------------
**
** STEP: Step-1
**
*Step, name=Step-1, nlgeom=YES, inc=1000
*Static, stabilize=0.002, allsdtol=0.05, continue=NO
0.001, 1., 1e-09, 0.01
**
** BOUNDARY CONDITIONS
**
** Name: BC-1 Type: Displacement/Rotation
*Boundary
_PickedSet25, 2, 2
_PickedSet25, 4, 4
_PickedSet25, 5, 5
** Name: BC-2 Type: Displacement/Rotation
*Boundary
_PickedSet26, 2, 2, -0.02
**
** OUTPUT REQUESTS
**
*Restart, write, frequency=0
**
** FIELD OUTPUT: F-Output-1
**
*Output, field
*Node Output
RF, U
*Element Output, directions=YES
EE, NFORC, PE, S, PEEQ
**
** HISTORY OUTPUT: H-Output-1
**
*Output, history, variable=PRESELECT
*End Step
