*Heading
 Alfano Crisfield non-symmetric multi-delamination analysis
** Job name: alfano_2d_tie_std Model name: Alfano
** Generated by: Abaqus/CAE 6.10-1
*Preprint, echo=NO, model=NO, history=NO, contact=NO
**
** PARTS
**
*Part, name=Bottom_cohesive
*Node
      1, 0.0799999982,           0.
      2,  0.200000003,           0.
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*Element, type=COH2D4
  1,   1,   9, 246,   4
  2,   9,  10, 245, 246
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*Nset, nset=_PickedSet3, internal, generate
   1,  364,    1
*Elset, elset=_PickedSet3, internal, generate
   1,  180,    1
** Section: coh
*Cohesive Section, elset=_PickedSet3, material=Coh, response=TRACTION SEPARATION, thickness=GEOMETRY
, 0.02
*End Part
**
*Part, name=Plate
*Node
      1,           0., 0.00161649997
      2,  0.200000003, 0.00161649997
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*Element, type=CPE4I
  1,   1,  13, 410,   4
  2,  13,  14, 409, 410
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*Nset, nset=_PickedSet4, internal, generate
    1,  1206,     1
*Elset, elset=_PickedSet4, internal, generate
   1,  600,    1
*Nset, nset=_PickedSet5, internal, generate
    1,  1206,     1
*Elset, elset=_PickedSet5, internal, generate
   1,  600,    1
*Orientation, name=Ori-1
          1.,           0.,           0.,           0.,           1.,           0.
3, 0.
** Section: plate
*Solid Section, elset=_PickedSet5, orientation=Ori-1, material=Mat1
0.02,
*End Part
**
*Part, name=Top_cohesive
*Node
      1, 0.0399999991,           0.
      2, 0.0410000011,           0.
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*Element, type=COH2D4
  1,   1,   2, 163, 162
  2,   2,   3, 164, 163
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*Nset, nset=_PickedSet3, internal, generate
   1,  322,    1
*Elset, elset=_PickedSet3, internal, generate
   1,  160,    1
** Section: coh
*Cohesive Section, elset=_PickedSet3, material=Coh, response=TRACTION SEPARATION, thickness=GEOMETRY
, 0.02
*End Part
**
**
** ASSEMBLY
**
*Assembly, name=Assembly
**
*Instance, name=Bottom_cohesive-1, part=Bottom_cohesive
        0.22,     0.001325,           0.
*End Instance
**
*Instance, name=Plate-1, part=Plate
        0.22,           0.,           0.
*End Instance
**
*Instance, name=Top_cohesive-1, part=Top_cohesive
        0.22,   0.00160325,           0.
*End Instance
**
*Nset, nset=topBC, instance=Plate-1
 4,
*Nset, nset=botBC, instance=Plate-1
 11,
*Nset, nset=dispBC, instance=Plate-1
  4, 11
*Nset, nset=_PickedSet21, internal, instance=Plate-1
 4,
*Elset, elset=_top_S1, internal, instance=Plate-1, generate
   1,  200,    1
*Surface, type=ELEMENT, name=top
_top_S1, S1
*Elset, elset=_middle-top_S3, internal, instance=Plate-1, generate
 201,  400,    1
*Surface, type=ELEMENT, name=middle-top
_middle-top_S3, S3
*Elset, elset=_middle-bot_S1, internal, instance=Plate-1, generate
 201,  400,    1
*Surface, type=ELEMENT, name=middle-bot
_middle-bot_S1, S1
*Elset, elset=_bottom_S1, internal, instance=Plate-1, generate
 401,  600,    1
*Surface, type=ELEMENT, name=bottom
_bottom_S1, S1
*Elset, elset=_botCoh-Top_S3, internal, instance=Bottom_cohesive-1, generate
   1,  180,    1
*Surface, type=ELEMENT, name=botCoh-Top
_botCoh-Top_S3, S3
*Elset, elset=_botCoh-Bot_S1, internal, instance=Bottom_cohesive-1, generate
   1,  180,    1
*Surface, type=ELEMENT, name=botCoh-Bot
_botCoh-Bot_S1, S1
*Elset, elset=_topCoh-Top_S3, internal, instance=Top_cohesive-1, generate
   1,  160,    1
*Surface, type=ELEMENT, name=topCoh-Top
_topCoh-Top_S3, S3
*Elset, elset=_topCoh-Bot_S1, internal, instance=Top_cohesive-1, generate
   1,  160,    1
*Surface, type=ELEMENT, name=topCoh-Bot
_topCoh-Bot_S1, S1
** Constraint: botCoh-Bottom
*Tie, name=botCoh-Bottom, adjust=yes
botCoh-Bot, bottom
** Constraint: botCoh-Middle
*Tie, name=botCoh-Middle, adjust=yes
botCoh-Top, middle-bot
** Constraint: cohTop-Middle
*Tie, name=cohTop-Middle, adjust=yes
topCoh-Bot, middle-top
** Constraint: cohTop-Top
*Tie, name=cohTop-Top, adjust=yes
topCoh-Top, top
*End Assembly
**
** MATERIALS
**
*Material, name=Coh
*Damage Initiation, criterion=QUADS
 3.3e+06, 7e+06,    0.
*Damage Evolution, type=ENERGY, mixed mode behavior=POWER LAW, power=1.
330.,800.,  0.
*Elastic, type=TRACTION
 8.5e+08, 8.5e+08, 8.5e+08
*Material, name=Mat1
*Density
 2.0388e+06,
*Elastic, type=ENGINEERING CONSTANTS
 1.15e+11, 8.5e+09, 8.5e+09,    0.29,    0.29,     0.3, 4.5e+09, 3.3e+09
 4.5e+09,
**
** INTERACTION PROPERTIES
**
*Surface Interaction, name=int
1.,
*Friction
0.,
**
** BOUNDARY CONDITIONS
**
** Name: fix Type: Displacement/Rotation
*Boundary
dispBC, 1, 1
**
** INTERACTIONS
**
** Interaction: lower
*Contact Pair, interaction=int, type=SURFACE TO SURFACE
bottom, middle-bot
** Interaction: upper
*Contact Pair, interaction=int, type=SURFACE TO SURFACE
top, middle-top
** ----------------------------------------------------------------
**
** STEP: Peel
**
*Step, name=Peel, nlgeom=YES, inc=5000
Pulling apart the plates
*Static, stabilize, factor=700000., allsdtol=0, continue=NO
0.01, 1., 1e-08, 1.
**
** BOUNDARY CONDITIONS
**
** Name: botDisp Type: Displacement/Rotation
*Boundary
botBC, 2, 2, -0.02
** Name: topDisp Type: Displacement/Rotation
*Boundary
topBC, 2, 2, 0.02
**
** CONTROLS
**
*Controls, reset
*Controls, analysis=discontinuous
*Controls, parameters=time incrementation
, , , , , , , 10, , ,
*Controls, parameters=line search
4, 4., 0.25, , 0.15
**
** OUTPUT REQUESTS
**
*Restart, write, frequency=0
*Monitor, dof=2, node=_PickedSet21, frequency=1
**
** FIELD OUTPUT: F-Output-1
**
*Output, field, frequency=9999
*Node Output
U,
*Element Output, directions=YES
S,
**
** HISTORY OUTPUT: H-Output-2
**
*Output, history
*Node Output, nset=dispBC
RF2, U2
**
** HISTORY OUTPUT: H-Output-1
**
*Output, history, variable=PRESELECT
*End Step
