*Heading
 Pullout Load Applied
** Job name: Pullout-NB221-1e9-1in Model name: Honeycomb
** Generated by: Abaqus/CAE 6.9-EF1
*Preprint, echo=NO, model=NO, history=NO, contact=NO
**
** PARTS
**
*Part, name=Panel
*Node
      1, 0.0340295471, 0.0618879497,           0.
      2, 0.0340295471,  0.054762952,           0.
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*Element, type=C3D8
  1, 2613, 2614, 7251, 7215,  365,  366, 2554, 2553
  2, 2614, 2615, 7252, 7251,  366,  367, 2555, 2554
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*Element, type=S4
925, 3033,  523,   25,  521
926,  521,   26,  522, 3033
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*Nset, nset=_PottingTop, internal
    5,    6,   16,   17,   18,   19
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*Elset, elset=_PottingTop, internal, generate
 8195,  8307,     1
*Nset, nset=_PottingBot, internal
    2,    3,    7,    8,    9,   10
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*Elset, elset=_PottingBot, internal, generate
 8308,  8420,     1
*Nset, nset=_PickedSet8, internal
    7,    8,    9,   10,   11,   12
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*Elset, elset=_PickedSet8, internal
  925,  926,  927,  928,  929,  930
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*Nset, nset=_PickedSet9, internal
    2,    3,    5,    6,    7,    8
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*Elset, elset=_PickedSet9, internal, generate
 8195,  8420,     1
*Nset, nset=_PickedSet10, internal
    8,   10,   12,   13,   19,   20
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*Elset, elset=_PickedSet10, internal
  956,  957,  958,  959,  960,  961
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*Nset, nset=_PickedSet11, internal
    2,    3,    5,    6,    7,    8
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*Elset, elset=_PickedSet11, internal, generate
 247,  924,    1
*Nset, nset=_PickedSet12, internal
    1,    2,    3,    4,    5,    6
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*Elset, elset=_PickedSet12, internal, generate
   1,  246,    1
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*Nset, nset=Insert-Top
    4,    5,    6,  401,  402,  403
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*Elset, elset=Insert-Top
 126, 129, 132, 135, 138, 141
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** Section: secSteel
*Solid Section, elset=_PickedSet12, material=Steel
,
** Section: secPotting
*Solid Section, elset=_PickedSet11, material=Potting
,
*Orientation, name=Ori-3
          1.,           0.,           0.,           0.,           1.,           0.
3, 0.
** Region: (secLaminate:Picked), (Material Orientation:Picked)
*Elset, elset=_I3, internal
  925,  926,  927,  931,  932,  933
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** Section: secLaminate
*Shell Section, elset=_I3, material=Laminate, orientation=Ori-3
0.000457, 5
*Orientation, name=Ori-1
          1.,           0.,           0.,           0.,           1.,           0.
3, 0.
** Region: (secLaminate:Picked), (Material Orientation:Picked)
*Elset, elset=_I4, internal
  928,  929,  930,  970,  971,  972
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** Section: secLaminate
*Shell Section, elset=_I4, material=Laminate, orientation=Ori-1
0.000457, 5
** Section: secHoneycomb
*Shell Section, elset=_PickedSet10, material=Honeycomb
0.00015, 5
*Orientation, name=Ori-2
          1.,           0.,           0.,           0.,           1.,           0.
3, 0.
** Region: (secLaminate:Picked), (Material Orientation:Picked)
*Elset, elset=_I6, internal, generate
 8195,  8307,     1
** Section: secLaminate
*Shell Section, elset=_I6, material=Laminate, orientation=Ori-2
0.000457, 5
*Orientation, name=Ori-4
          1.,           0.,           0.,           0.,          -1.,           0.
3, 0.
** Region: (secLaminate:Picked), (Material Orientation:Picked)
*Elset, elset=_I7, internal, generate
 8308,  8420,     1
** Section: secLaminate
*Shell Section, elset=_I7, material=Laminate, orientation=Ori-4
0.000457, 5
*End Part
**
**
** ASSEMBLY
**
*Assembly, name=Assembly
**
*Instance, name=instPanel, part=Panel
*End Instance
**
*Nset, nset=_PickedSet50, internal, instance=instPanel
   28,   29,   30,   39,   40,   41
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*Elset, elset=_PickedSet50, internal, instance=instPanel
  928,  929,  930,  970,  971,  972
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*Nset, nset=_PickedSet51, internal, instance=instPanel
    1,    3,    4,    6,   15,   17
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*Elset, elset=_PickedSet51, internal, instance=instPanel
    1,    2,    3,    4,    5,   31
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*Nset, nset=_PickedSet52, internal, instance=instPanel
    1,    2,    4,    5,    7,   16
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*Elset, elset=_PickedSet52, internal, instance=instPanel
    5,   10,   15,   20,   25,   30
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*Elset, elset=__PickedSurf49_S4, internal, instance=instPanel, generate
 126,  213,    3
*Elset, elset=__PickedSurf49_S3, internal, instance=instPanel
 214, 217, 220, 223, 226, 229, 230, 231, 232, 233, 234
*Surface, type=ELEMENT, name=_PickedSurf49, internal
__PickedSurf49_S4, S4
__PickedSurf49_S3, S3
*End Assembly
*Amplitude, name=EqAmp, definition=EQUALLY SPACED, fixed interval=10.
          0.,          0.5,           1.,           1.
*Amplitude, name=SmoothAmp, definition=SMOOTH STEP
          0.,           0.,          20.,           1.,          40.,           1.
**
** MATERIALS
**
*Material, name=Honeycomb
*Density
1000.,
*Elastic
 1e+09, 0.3
*Material, name=Laminate
*Density
1652.,
*Elastic, type=ENGINEERING CONSTANTS
 1.79e+10, 1.79e+10,    6e+09,      0.3,      0.3,      0.3,    6e+09,    1e+09
    1e+09,
*Material, name=Potting
*Density
1100.,
*Elastic
 8.9e+08, 0.3
*Material, name=Steel
*Density
7700.,
*Elastic
 2.1e+11, 0.3
**
** BOUNDARY CONDITIONS
**
** Name: Clamp Type: Displacement/Rotation
*Boundary
_PickedSet50, 3, 3
** Name: XSym Type: Symmetry/Antisymmetry/Encastre
*Boundary
_PickedSet52, XSYMM
** Name: YSym Type: Symmetry/Antisymmetry/Encastre
*Boundary
_PickedSet51, YSYMM
** ----------------------------------------------------------------
**
** STEP: Pullout
**
*Step, name=Pullout
Explicit Pullout
*Dynamic, Explicit
, 40.
*Bulk Viscosity
0.06, 1.2
** Mass Scaling: Semi-Automatic
**               Whole Model
*Variable Mass Scaling, dt=0.0001, type=below min, frequency=100
**
** LOADS
**
** Name: Pressure   Type: Pressure
*Dsload, amplitude=EqAmp
_PickedSurf49, P, -8.35189e+06
**
** OUTPUT REQUESTS
**
*Restart, write, number interval=1, time marks=NO
**
** FIELD OUTPUT: F-Output-1
**
*Output, field, variable=PRESELECT
**
** HISTORY OUTPUT: Insert-ReactionForce
**
*Output, history
*Node Output, nset=instPanel.Insert-Top
RF3, U3
**
** HISTORY OUTPUT: H-Output-1
**
*Output, history, variable=PRESELECT
*End Step
