!
! Linear buckling
!
resume, ../Al_bracket_upd_med, db
/filname, run_bra_axial_med_lb_b_sig, 0

/solu
allsel
antype, static

!
! Apply axial load at end (on face sheets)
!
seltol, 1.0e-5
asel, s, mat, , mat_face
nsla, s, 1
nsel, r, loc, x, xmax_panel+face_thick

*get, numNode, node, 0, count
load_val = 0.22838e6/numNode

f, all, fx, -load_val

allsel
solve
finish
