resume, ../Al_bracket_act_axial_med, db
/filname, run_bra_axial_med_linbuck_a, 0

/solu
allsel
antype, static
pstres, on

!
! Apply moment at end
!
seltol, 1.0e-5
nsel, s, loc, x, xmax_panel
*get, numNode, node, 0, count
load_val = 1.0/numNode   ! 1 kN

f, all, fx, -load_val

allsel
solve
finish

/solu
antype, buckle
bucopt, lanb, 1
mxpand, 1
solve
finish
