resume, ../Al_bracket_upd_med, db
/filname, run_bra_axial_med_nlb_b, 0

/solu
allsel
antype, static
nlgeom, on
autots, on
solcontrol, on
nropt, full, , off
time, 1
nsubst, 200
neqit, 30
outres, all, all

!
! Apply axial load at end
!
seltol, 1.0e-5
asel, s, mat, , mat_face
nsla, s, 1
nsel, r, loc, x, xmax_panel+face_thick

*get, numNode, node, 0, count
load_val = 141220/numNode

f, all, fx, -load_val

allsel
solve
finish
