resume, ../Al_bracket_upd, db
/filname, run_bra_axial_nlbuck_b, 0

/solu
allsel
antype, static
nlgeom, on
autots, on
solcontrol, on
!arclen, on
nropt, full, , off
time, 1
!nsubst, 2000
cnvtol, f, , 0.1, , 1.0e-4
deltime, 0.001, 0.00001, 0.002
neqit, 60
outres, all, all

!
! Apply moment at end
!
seltol, 1.0e-5
asel, s, mat, , mat_face
nsla, s, 1
nsel, r, loc, x, xmax_panel+face_thick

*get, numNode, node, 0, count
load_val = 230281/numNode

f, all, fx, -load_val

allsel
solve
finish
