resume, ../Al_bracket_ext, db
/filname, run_ext_axial_nlbuck_b, 0

/solu
allsel
antype, static
nlgeom, on
autots, on
solcontrol, on
nropt, full, , off
time, 1
nsubst, 200
neqit, 30
outres, all, all

!
! Apply moment at end
!
seltol, 1.0e-5
asel, s, mat, , mat_face
nsla, s, 1
nsel, r, loc, x, xmax_panel

*get, numNode, node, 0, count
load_val = 230000/numNode

f, all, fx, -load_val

allsel
solve
finish
