resume, ../Al_bracket_ext, db
/filname, run_ext_mom_nlbuck_b, 0

/solu
allsel
antype, static
nlgeom, on
!autots, on
!solcontrol, on
nropt, full, , off
nsubst, 200
neqit, 30
outres, all, all

*do, ls, 1, 10, 1

  time, ls
  !
  ! Apply moment at end
  !
  seltol, 1.0e-5
  asel, s, mat, , mat_face
  nsla, s, 1
  nsel, r, loc, x, xmax_panel

  ! Begin of equation: P*(2*({Y}-Y1)/(Y2-Y1) - 1)
  load_val = 23000
  !*get, numNode, node, 0, count
  !nodal_f = load_val/numNode
  nodal_f = load_val*ls/10
  *dim, load_dist, table,6,9,1,,,,0
  *set, load_dist(0,0,1), 0.0, -999
  *set, load_dist(2,0,1), 0.0
  *set, load_dist(3,0,1), nodal_f
  *set, load_dist(4,0,1), ymin_panel
  *set, load_dist(5,0,1), ymax_panel
  *set, load_dist(6,0,1), 0.0
  *set, load_dist(0,1,1), 1.0, -1, 0, 1, 3, 2, 18
  *set, load_dist(0,2,1), 0.0, -2, 0, 2, 0, 0, -1
  *set, load_dist(0,3,1),   0, -3, 0, 1, -2, 3, -1
  *set, load_dist(0,4,1), 0.0, -1, 0, 1, 19, 2, 18
  *set, load_dist(0,5,1), 0.0, -2, 0, 1, -3, 4, -1
  *set, load_dist(0,6,1), 0.0, -1, 0, 1, 0, 0, -2
  *set, load_dist(0,7,1), 0.0, -3, 0, 1, -2, 2, -1
  *set, load_dist(0,8,1), 0.0, -1, 0, 1, 17, 3, -3
  *set, load_dist(0,9,1), 0.0, 99, 0, 1, -1, 0, 0
  ! End of equation: P*(2*({Y}-Y1)/(Y2-Y1) - 1)
  f, all, fx, %load_dist%

  allsel
  solve

*enddo
finish
