! Extract stresses in adhesive as afunction of time
!
/post1
/uis, msgpop, 3

!----------------------------------------------------------------
! Open the results file and a file for writing results
!----------------------------------------------------------------
!file,'Al_bracket_ax_lessshort_f','rst','.'
!*cfopen, AxLessShort_f_Adh, dat
file,'Al_bracket_ax_lessshort','rst','.'
*cfopen, AxLessShort_Adh, dat

!----------------------------------------------------------------
! Choose the first set
!----------------------------------------------------------------
allsel
set, first

!----------------------------------------------------------------
! Select nodes in the top adhesive layer and create a component
!----------------------------------------------------------------
esel, s, mat, , mat_adh
nsle, s, all
nsel, r, loc, x, xmin_panel_adh, xmin_panel_ins_adh
nsel, r, loc, y, ymax_panel_face-adh_thick_core, ymax_panel_face
esln, r
cm, elem_adh, elem
*get, numElem, elem, 0, count
*get, minElem, elem, 0, num, min

!----------------------------------------------------------------
! Create an element table
!----------------------------------------------------------------
etable, stress, s, xy

!----------------------------------------------------------------
! Get the number of steps in the data file
! and Loop through the steps
!----------------------------------------------------------------
*get, numStep, active, 0, set, nset

!----------------------------------------------------------------
! Loop through the steps
!----------------------------------------------------------------
*dim, sig_adh, array, 1
*do, jj, 1, numStep

  !----------------------------------------------------------------
  ! Get the current time
  !----------------------------------------------------------------
  *get, curTime, active, 0, set, time

  !----------------------------------------------------------------
  ! Get the nodal reaction force
  !----------------------------------------------------------------
  allsel
  cmsel, s, end_load, node
  *get, numNode, node, 0, count
  *get, curNode, node, 0, num, min
  sig_tot = 0
  sig_node = 0
  *do, ii, 1, numNode
     *get, sig_node, node, curNode, s, x
     sig_tot = sig_tot+sig_node
     *get, curNode, node, curNode, nxth
  *end do
  len = ymax_panel_face-ymin_panel_face
  f_tot = sig_tot*len

  !----------------------------------------------------------------
  ! Save the time and number of elements
  !----------------------------------------------------------------
  allsel
  cmsel, s, elem_adh, elem
  curElem = minElem
  *do, ii, 1, numElem
    !----------------------------------------------------------------
    ! Read the element data
    !----------------------------------------------------------------
    *get, sig_adh(1), elem, curElem, etab, stress

    !----------------------------------------------------------------
    ! Write the element data
    !----------------------------------------------------------------
    *vwrite, numElem, curElem, curTime, f_tot, sig_adh(1)
    (f6.0,1x,f6.0,1x,e16.7,1x,e16.7,1x,e16.7)

    !----------------------------------------------------------------
    ! get the next element
    !----------------------------------------------------------------
    *get, curElem, elem, curElem, nxth
  *enddo

  !----------------------------------------------------------------
  ! Go to next set and refill etable
  !----------------------------------------------------------------
  set, next
  etable, refl
*end do

!----------------------------------------------------------------
! Close the file
!----------------------------------------------------------------
*cfclose
