/title, Circular shell (solid)
/filname, circSolShMom, on

!---------------------------------------------
! Geometry parameters
!
a_shell = 1.0e-2
h_shell = 5.0e-4

!---------------------------------------------
! Material parameters
!
E_shell = 70e9
nu_shell = 0.35

!---------------------------------------------
! Mesh parameters
!
el_size = 0.5*0.1*a_shell

!----------------------------------------------
! Section and Element types
!
sec_shell = 1
type_shell = 1
type_dummy = 2
real_shell = 1
real_dummy = 2
mat_shell = 1

/prep7

!-----------------------------------------------
! Create geometry
!
k, 1, 0, 0, 0
cyl4, 0, 0, a_shell, 0, , 90
cyl4, 0, 0, a_shell, 90, , 180
cyl4, 0, 0, a_shell, 180, , 270
cyl4, 0, 0, a_shell, 270, , 360
aglue, all

!-----------------------------------------------
! Section types and data
!
sectype, sec_shell, shell, , sec_shell
!secdata, h_shell, mat_shell, 0.0, 3, shell_lay
secdata, h_shell, mat_shell, 0.0, 5, shell_lay

!-----------------------------------------------
! Element types
!
et, type_shell, solsh190
!keyopt, type_shell, 6, 1
keyopt, type_shell, 8, 1
et, type_dummy, shell181
r, real_shell
r, real_dummy, h_shell

!-----------------------------------------------
! Material properties
!
mp, ex, mat_shell, E_shell
mp, prxy, mat_shell, nu_shell

!---------------------------------------------
! Mesh lines
!
type, type_dummy
lesize, all, el_size
amesh, all
numcmp, area

!---------------------------------------------
! Extrude volume
!
type, type_shell
secnum, sec_shell
extopt, aclear, 1   ! Clear area after volume is generated
esize, , 1
voffset, 1, h_shell
voffset, 2, h_shell
voffset, 3, h_shell
voffset, 4, h_shell
!vglue, all


!---------------------------------------------
! Force Boundary conditions
!
csys, 1
max_load = 1000
slope = max_load/h_shell
p0 = 0.000001
asel, s, loc, x, a_shell
nsla, s, 1
sfgrad, pres, 0, z, h_shell/2, slope
!sfa, all, , pres, p0
sf, all, pres, p0
allsel
sftran

!---------------------------------------------
! Dirichlet Boundary conditions
!
seltol, 1.0e-6
csys, 0
nsel, s, loc, x, 0
d, all, ux, 0
nsel, s, loc, y, 0
d, all, uy, 0
allsel

save, circSolShMom, db
finish

!--------------------------------------------
! Solve
!
!/solu
!antype, static
!
!outres, all
!outpr, all, 1
!solve
!finish

!--------------------------------------------
! Postprocess
!
!/post1
!layer, 1
!shell, top
!plnsol, u, y
!
!writedats, 'layer1mids.dat'
!writeels, 'layer1midsel.dat'
!
!layer, 2
!shell, mid
!writedats, 'layer2mids.dat'
!writeels, 'layer2midsel.dat'
!
!layer, 3
!shell, mid
!writedats, 'layer3mids.dat'
!writeels, 'layer3midsel.dat'
!
!layer, 4
!shell, bot
!writedats, 'layer4mids.dat'
!writeels, 'layer4midsel.dat'
!
!finish
